step1
Nk := 1
f := 44100
GETWAVINFO("C:\Users\SCK\Desktop\test.wav") = [1; 44100; 16; 88200]
Q := 16
B := 88200
step2
ORIGIN := 1
C := READWAV("C:\Users\SCK\Desktop\test.wav")
i := 1000, 1001 .. 1010
i = [1000; 1001; 1002; 1003; 1004; 1005; 1006; 1007; 1008; 1009; 1010]
C[i, 1] = [-529; -504; -455; -399; -351; -307; -286; -300; -313; -309; -318]
C[i, 1] = [-529; -504; -455; -399; -351; -307; -286; -300; -313; -309; -318]
N := rows(C) = 441000
n := 1 .. N
t[n] := n/f
Δt := f^-1 = 2.26757e-5
tΣ := max(t) = 10
t[i] = [0.0226757; 0.0226984; 0.0227211; 0.0227438; 0.0227664; 0.0227891; 0.0228118; 0.0228345; 0.0228571; 0.0228798; 0.0229025]
N/tΣ = 44100
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step3
M := READBIN("C:\Users\SCK\Desktop\mt.txt", "byte", 0)
rows(M) = 712
M = [
    203; 224; 238; 241; 13; 10; 203; 224; 238; 241
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]
M = [
    203; 224; 238; 241; 13; 10; 203; 224; 238; 241
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]
μs := 0
μe := "1KoHec1"
Me := stack(M, str2vec(μe))
rows(C)*cols(C) = 441000
8*rows(Me) = 5752
rows(Me) = 719
step5
Cv :=
    Cv ← reverse(C[:, 1])
    if Nk ≥ 2
        for i ∈ 2 .. Nk
            Cv ← stack(Cv, reverse(C[:, i]))
    Cv
B2D(x) := sum(x[i]*2^(i - 1), i = 1 .. rows(x))
D2B(x) :=
    znak ← sign(x)
    for i ∈ 1 .. 8
        v[i] ← mod(|x|, 2)
        x ← floor(|x|/2)
    znak*v
Sv :=
    Sv ← Cv
    Z ← μs
    for τ ∈ 1 .. rows(Me)
        b ← D2B(Me[τ])
        for i ∈ 1 .. 8
            Z ← Z + 14
            znak ← 1 if Cv[Z] ≥ 0
            znak ← -1 if Cv[Z] < 0
            P ← D2B(Cv[Z])
            P[1] ← znak*b[i]
            Sv[Z] ← B2D(P)
    Sv
# step 6
S :=
    for i ∈ 1 .. cols(C)
        S[:, i] ← reverse(submatrix(Sv, (i - 1)*rows(C) + 1, i*rows(C), 1, 1))
    S
WRITEWAV("C:\Users\SCK\Desktop\B1.wav", f, Q) := S
# step 7
Sn := READWAV("C:\Users\SCK\Desktop\B1.wav")
Nk1 := 1
f1 := 44100
GETWAVINFO("C:\Users\SCK\Desktop\B1.wav") = [1; 44100; 16; 88200]
Q1 := 16
B1 := 88200
Svn :=
    Svn ← reverse(Sn[:, 1])
    if Nk ≥ 2
        for i ∈ 2 .. Nk
            Svn ← stack(Svn, reverse(Sn[:, i]))
    Svn
Mf :=
    Z ← μs
    err ← 0
    for τ ∈ 1 .. rows(Svn)
        for i ∈ 1 .. 8
            Z ← Z + 14
            if Z ≥ rows(Svn)
                err ← 1
                break
            P ← D2B(Svn[Z])
            b[i] ← |P[1]|
        Mf[τ] ← B2D(b)
        Mf[τ] ← Mf[τ] + 32.5 if Mf[τ] < 32
        if err == 1
            {
                break
            }
    Mf
N :=
    for s ∈ 0, 1 .. 31
        i ← 1
        for μ ∈ 1 .. rows(Mf)
            if Mf[μ] == s - 32.5
                N[i, s + 1] ← μ
                i ← i - 1
    N
M :=
    e ← 0
    βe ← strlen(μe)
    Mf ← vec2str(Mf)
    for τ ∈ 1 .. strlen(Mf)
        e ← τ if substr(Mf, τ, βe) == μe and e == 0
        break if e ≠ 0
    Mf ← substr(Mf, 0, e)
    M ← str2vec(Mf)
    for n ∈ 1 .. cols(N)
        for i ∈ 1 .. rows(N)
            break if N == 0
            M[N[i, n]] ← n - 1 if 0 < N[i, n] ≤ rows(M)
    M
vec2str(M)
WRITEBIN("M_dec.txt", "byte", 0) := M
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